# LAMMPS Input Script to Compute Atomic Forces

# Initialize and define units and boundary conditions
units 	     metal
atom_style   atomic
boundary     p p p

# Define the simulation box using known bounds from the .dump file header
region 	     simbox prism 945.2951058648548 1737.1266170496060 -400.6353272792469 &
                          419.56442404085044 -310.1190542204561 494.72260784626945 &
                          6.2188278662727674 -2.4918818131154445 3.0074771675674690 &
                          units box
create_box   1 simbox

# Read atoms from an existing .dump file, specifying scaled coordinates (xs, ys, zs)
read_dump    final.W0.dump 250000 x y z box yes add yes replace yes

# Define the interatomic potential (customize as needed)
pair_style   eam/alloy
pair_coeff   * * W0.eam.alloy W0

# Output atoms with computed forces into a new .dump file
dump 	     output all custom 1 final.W0.mod.dump id type xs ys zs x y z
# Sort by index to help with atom indexing later
dump_modify  output sort id format line "%d %d %.16g %.16g %.16g %.16g %.16g %.16g"

# Run a single step to compute forces and output results
run   	     0

# Clean up
undump	     output
